**
** ABAQUS Input Deck Generated by HyperMesh Version  : 12.0.0.85
** Generated using HyperMesh-Abaqus Template Version : 12.0
**
**   Template:  ABAQUS/STANDARD 3D
**
*NODE
         1,  -1.0           ,  1.0            ,  0.0
         2,  -0.5           ,  1.0            ,  0.0
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**HWCOLOR COMP          1    25
*ELEMENT,TYPE=C3D8R,ELSET=Steel
         1,        18,        20,        21,        17,        26,        27,        28,
        29
         2,        26,        27,        28,        29,        30,        31,        32,
        33
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**HWCOLOR COMP          2    29
*ELEMENT,TYPE=C3D8R,ELSET=Wood
        33,        15,        23,        24,        14,        86,        87,        88,
        89
        34,        86,        87,        88,        89,        90,        91,        92,
        93
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**HM_comp_by_property "Wood"    11
*SOLID SECTION, ELSET=Steel, MATERIAL=Steel
**HM_comp_by_property "Wood"    11
*SOLID SECTION, ELSET=Wood, MATERIAL=Wood
*MATERIAL, NAME=Steel
*CONDUCTIVITY,TYPE=ISO
100.0     ,0.0
*MATERIAL, NAME=Wood
*CONDUCTIVITY,TYPE=ISO
10.0      ,0.0
**HMNAME LOADSTEP          1 Thermal Analysis
*STEP
*HEAT TRANSFER, STEADY STATE
**HWNAME LOADCOL          1 auto1
**HWCOLOR LOADCOL          1    11
*BOUNDARY
         1,11, ,200.0
         2,11, ,200.0
         3,11, ,200.0
         4,11, ,200.0
         5,11, ,200.0
         6,11, ,200.0
         7,11, ,200.0
         8,11, ,200.0
         9,11, ,200.0
        10,11, ,200.0
        11,11, ,200.0
        12,11, ,200.0
        13,11, ,200.0
        14,11, ,200.0
        15,11, ,200.0
        16,11, ,200.0
        17,11, ,200.0
        18,11, ,200.0
        19,11, ,200.0
        20,11, ,200.0
        21,11, ,200.0
        22,11, ,200.0
        23,11, ,200.0
        24,11, ,200.0
        25,11, ,200.0
*END STEP
*****
