**
** ABAQUS Input Deck Generated by HyperMesh Version  : 12.0.0.85
** Generated using HyperMesh-Abaqus Template Version : 12.0
**
**   Template:  ABAQUS/STANDARD 3D
**
*NODE
         1,  1.0            ,  -1.0           ,  0.0
         2,  1.0            ,  0.0            ,  0.0
         3,  1.0            ,  1.0            ,  0.0
         4,  0.0            ,  1.0            ,  0.0
         5,  -1.0           ,  1.0            ,  0.0
         6,  -1.0           ,  0.0            ,  0.0
         7,  -1.0           ,  -1.0           ,  0.0
         8,  -0.333333333333,  -1.0           ,  0.0
         9,  0.3333333333333,  -1.0           ,  0.0
        10,  0.0            ,  -0.021191683508,  0.0
**HWCOLOR COMP          1    11
*ELEMENT,TYPE=S4,ELSET=auto1
         1,         5,         6,        10,         4
         2,         4,        10,         2,         3
         3,         6,         7,         8,        10
         4,        10,         9,         1,         2
**HWCOLOR COMP          1    11
*ELEMENT,TYPE=S3,ELSET=auto1
         5,         8,         9,        10
**
*Step
*Static, nlgeom
**
*Boundary
1, 1, 2, 0.
5, 1, 2, -1.
*end step
*step
**
*Dynamic, explicit
*cload
9, 2, -10.
1, 5, 6.
*end step
