**
** ABAQUS Input Deck Generated by HyperMesh Version  : 12.0.0.85
** Generated using HyperMesh-Abaqus Template Version : 12.0
**
**   Template:  ABAQUS/STANDARD 3D
**
*NODE
         1,  0.5            ,  0.5            ,  0.0
         2,  0.5            ,  -0.5           ,  0.0
         3,  0.5            ,  -0.5           ,  1.0
         4,  0.5            ,  -0.5           ,  2.0
         5,  0.5            ,  -0.5           ,  3.0
         6,  0.5            ,  -0.5           ,  4.0
         7,  0.5            ,  0.5            ,  4.0
         8,  0.5            ,  0.5            ,  3.0
         9,  0.5            ,  0.5            ,  2.0
        10,  0.5            ,  0.5            ,  1.0
        11,  -0.5           ,  0.5            ,  0.0
        12,  -0.5           ,  -0.5           ,  0.0
        13,  -0.5           ,  -0.5           ,  1.0
        14,  -0.5           ,  0.5            ,  1.0
        15,  -0.5           ,  -0.5           ,  2.0
        16,  -0.5           ,  0.5            ,  2.0
        17,  -0.5           ,  -0.5           ,  3.0
        18,  -0.5           ,  0.5            ,  3.0
        19,  -0.5           ,  -0.5           ,  4.0
        20,  -0.5           ,  0.5            ,  4.0
**HWCOLOR COMP          1    11
*ELEMENT,TYPE=C3D8R,ELSET=auto1
         1,         1,         2,         3,        10,        11,        12,        13,
        14
         2,        10,         3,         4,         9,        14,        13,        15,
        16
         3,         9,         4,         5,         8,        16,        15,        17,
        18
         4,         8,         5,         6,         7,        18,        17,        19,
        20
**HMNAME LOADSTEP          1 Loading
*STEP
**HWNAME LOADCOL          1 auto1
**HWCOLOR LOADCOL          1    11
*BOUNDARY
         1,1,3,0.0
         2,1,3,0.0
        11,1,3,0.0
        12,1,3,0.0
*CLOAD
         9,2,-5.0
        14,2,-5.0
        16,2,-5.0
*DLOAD
         4,   P5,1.0
*END STEP
*****
*STEP
**HWNAME LOADCOL          1 auto1
**HWCOLOR LOADCOL          1    11
*BOUNDARY
         1,1,3,1.0
         2,1,3,0.1
        11,1,3,0.2
        12,1,3,-0.2
*CLOAD
         9,2, 5.0
        14,2,-15.0
        16,2, 25.0
*DLOAD
         4,   P5,2.0
*END STEP
*****
